OpenVSP model (file version 5), 11 components.
Geometry view with OpenVSP parameter names; values to 6 digits, angles in degrees, lengths in the model's unit.
Overall bounding box: X_Min=0 X_Len=23.6963 Y_Min=-10.5036 Y_Len=21.0071 Z_Min=-0.688072 Z_Len=6.79326

Fuselage "FuselageGeom"
  location (X Y Z) 0 0 0, rotation 0 0 0
  bounding box size 23.31 2.6 2.59866
  Design: Length=23.31
  cross sections:
    n  XLocPercent  YLocPercent  ZLocPercent  shape
    0  0            0            0            point
    1  0.14         0            0.032175     ellipse Ellipse_Height=2.5 Ellipse_Width=2.6
    2  0.25         0            0.032175     as above
    3  0.375        0            0.032175     as above
    4  0.5          0            0.032175     as above
    5  0.622051     0            0.032175     as above
    6  0.808666     0            0.0429       ellipse Ellipse_Height=1.7 Ellipse_Width=1.45459
    7  0.995281     0            0.0615616    rounded rectangle RoundRectXSec_Radius=0.05 RoundedRect_Height=0.25 RoundedRect_Width=0.15
    8  1            0            0.0634921    point

Wing "H-Tail"
  location (X Y Z) 21.5 0 5.4, rotation 0 0 0
  symmetric about XZ
  bounding box size 1.92047 6.85772 0.187609
  totals: TotalSpan=6.8 TotalProjectedSpan=6.8 TotalChord=1.37313 TotalArea=9.80052 TotalAR=4.71812
  root: chord 1.5, twist 0, NACA 4-series Camber=0 CamberLoc=0.2 ThickChord=0.1
  sections:
    n  Span  Root_Chord  Tip_Chord  Area     Sweep    Sweep_Location  Dihedral  Twist  Twist_Location  tip airfoil
    1  0.3   1.5         1.875      0.50625  8.61932  0               0         0      0.25            as above
    2  2.7   1.875       1.1        4.01625  8.61932  0.25            0         0      0.25            as above
    3  0.4   1.1         0.7888     0.37776  25.8778  0.25            0         0      0.25            as above

Wing "V-Tail"
  location (X Y Z) 13.4 0 2.1, rotation 90 0 -5.43478
  bounding box size 10.2963 0.380363 4.82919
  totals: TotalSpan=4.83333 TotalProjectedSpan=4.83333 TotalChord=3.38391 TotalArea=16.7436 TotalAR=1.39522
  root: chord 8.7, twist 0, NACA 4-series Camber=0 CamberLoc=0.2 ThickChord=0.03
  sections:
    n  Span      Root_Chord  Tip_Chord  Area      Sweep    Sweep_Location  Dihedral  Twist  Twist_Location  tip airfoil
    1  1.2       8.7         3.80142    7.50085   77       0               0         0      0.25            NACA 4-series Camber=0 CamberLoc=0.2 ThickChord=0.1
    2  0.933334  3.80142     2.89456    3.12479   50.6818  0               0         0      0.25            as above
    3  2.4       2.89456     1.80726    5.64218   34.7273  0               0         0      0.25            as above
    4  0.3       1.80726     1.36482    0.475812  59.8864  0               0         0      0.25            as above

Wing "Ventral Fins"
  location (X Y Z) 18.75 0.6 0.5, rotation -45 0 -12
  symmetric about XZ
  bounding box size 2.78516 1.38544 0.497015
  totals: TotalSpan=1 TotalProjectedSpan=1 TotalChord=1.875 TotalArea=1.875 TotalAR=0.533333
  root: chord 2.75, twist 0, NACA 4-series Camber=0 CamberLoc=0.2 ThickChord=0.04
  sections:
    n  Span  Root_Chord  Tip_Chord  Area    Sweep    Sweep_Location  Dihedral  Twist  Twist_Location  tip airfoil
    1  0.5   2.75        1          0.9375  73.9773  0               0         0      0.25            as above

Stack "LG Pod"
  location (X Y Z) 6.75 0 -0.1, rotation 0 0 0
  bounding box size 8.38525 2.9 1.15918
  cross sections:
    n  XDelta   YDelta  ZDelta  shape
    0  0        0       0       point
    1  2.88525  0       -0.1    edit curve Width=2.9 Height=1.2 AbsoluteFlag=0 SymType=0 cubic Bezier points (X Y): 0.5 0, 0.5 -0.275958, 0.269178 -0.56113, 0.00205479 -0.263185, -0.273288 -0.580993, -0.5 -0.275958, -0.5 0, -0.5 0.275958, -0.275958 0.5, 0 0.5, 0.275958 0.5, 0.5 0.275958, 0.5 0
    2  2        0       0       edit curve Width=2.9 Height=1.2 AbsoluteFlag=0 SymType=0 cubic Bezier points (X Y): 0.5 0, 0.5 -0.275958, 0.289726 -0.471747, 0.00205479 -0.243322, -0.273288 -0.481678, -0.5 -0.275958, -0.5 0, -0.5 0.275958, -0.275958 0.5, 0 0.5, 0.275958 0.5, 0.5 0.275958, 0.5 0
    3  1.5      0       0       edit curve Width=2.5 Height=1 AbsoluteFlag=0 SymType=0 cubic Bezier points (X Y): 0.5 0, 0.5 -0.275958, 0.277397 -0.570205, -0.00205479 -0.303082, -0.260959 -0.559932, -0.5 -0.275958, -0.5 0, -0.5 0.275958, -0.275958 0.5, 0 0.5, 0.275958 0.5, 0.5 0.275958, 0.5 0
    4  2        0       0       point

Stack "Wing Box"
  location (X Y Z) 3.5 0 1.86522, rotation 0 0 0
  bounding box size 12 2.29645 1.13267
  cross sections:
    n  XDelta  YDelta  ZDelta  shape
    0  0       0       0       point
    1  3       0       0       rounded rectangle RoundRectXSec_Radius=0.2 RoundRect_Keystone=0.4 RoundedRect_Height=1.01351 RoundedRect_Width=1.8
    2  3       0       0       as above
    3  3       0       0       rounded rectangle RoundRectXSec_Radius=0.4 RoundRect_Keystone=0.4 RoundedRect_Height=1.01351 RoundedRect_Width=1.2
    4  3       0       0       point

Wing "Main Wing"
  location (X Y Z) 8.2 0 2.35, rotation 0 0 0
  symmetric about XZ
  bounding box size 2.60012 21.0071 0.312347
  totals: TotalSpan=20.98 TotalProjectedSpan=20.98 TotalChord=1.86297 TotalArea=39.5738 TotalAR=11.1225
  root: chord 2.6, twist 0, NACA 64-series A=1 IdealCl=0.2 ThickChord=0.12
  sections:
    n  Span  Root_Chord  Tip_Chord  Area     Sweep    Sweep_Location  Dihedral  Twist  Twist_Location  tip airfoil
    1  1.45  2.6         2.35       3.58875  6.21307  0.25            0         0      0.25            as above
    2  2     2.35        2.2        4.55     0        0.25            0         0      0.25            NACA 64-series A=1 IdealCl=0.2 ThickChord=0.1
    3  5.9   2.2         1.4        10.62    6        0               0         0      0.25            as above
    4  1.14  1.4         0.403758   1.02814  32       0.25            0         0      0.25            NACA 64-series A=1 IdealCl=0.2 ThickChord=0.08

Propeller "Propellers"
  location (X Y Z) 6 3.5 1.825, rotation 0 0 0
  symmetric about XZ
  bounding box size 0.338767 10.9021 3.41221
  Design: Diameter=3.9 NumBlade=6 Beta34=20 UseBeta34Flag=1 Feather=-6.98037 Rotate=0 Precone=0 ReverseFlag=0 FoldAngle=0 PropMode=0 AF=96.4324 CLi=0.540239 Chord=0.159783 Solidity=0.305164 ConstructXoC=0.5 FeatherAxisXoC=0.5 FeatherOffsetXoC=0
  cross sections:
    n  RadiusFrac  shape
    0  0.1         ellipse Ellipse_Height=0.0744792 Ellipse_Width=0.148958
    1  0.4         NACA 16-series Chord=0.398059 IdealCl=0.7 ThickChord=0.144074
    2  1           NACA 16-series Chord=0.0695139 IdealCl=0.2 ThickChord=0.03
  Chord along r/R (cubic Bezier): 0.1: 0.0763889, 0.186519: 0.195, 0.273038: 0.203704, 0.359557: 0.203704, 0.513943: 0.208796, 0.668329: 0.173148, 0.822715: 0.1375, 0.88181: 0.112037, 0.940905: 0.0763889, 1: 0.0356481
  Twist along r/R (PCHIP): 0.1: 81.4815, 0.734349: 28.4167, 1: 3.20833
  Thick along r/R (cubic Bezier): 0.1: 0.5, 0.166667: 0.3, 0.233333: 0.225, 0.3: 0.2, 0.4: 0.125, 0.5: 0.115, 0.6: 0.1, 0.733333: 0.075, 0.866667: 0.055, 1: 0.03
  CLI along r/R (cubic Bezier): 0.1: 0, 0.2: 0.7, 0.3: 0.7, 0.4: 0.7, 0.466667: 0.7, 0.533333: 0.7, 0.6: 0.7, 0.733333: 0.7, 0.866667: 0.7, 1: 0.2

Stack "Nacelles"
  location (X Y Z) 5.5 3.5 1.825, rotation 0 0 0
  symmetric about XZ
  bounding box size 5.10656 8.00114 1.42522
  cross sections:
    n  XDelta    YDelta  ZDelta  shape
    0  0         0       0       point
    1  0.8       0       0       circle Circle_Diameter=0.85
    2  0.2       0       -0.15   rounded rectangle RoundRectXSec_Radius=0.4 RoundedRect_Height=1.28378 RoundedRect_Width=0.983784
    3  1.09836   0       0.05    rounded rectangle RoundRectXSec_Radius=0.4 RoundedRect_Height=1.4 RoundedRect_Width=0.983784
    4  2         0       0.05    rounded rectangle RoundRectXSec_Radius=0.4 RoundedRect_Height=1.1 RoundedRect_Width=0.8
    5  0.508197  0       0.1     ellipse Ellipse_Height=0.700541 Ellipse_Width=0.6
    6  0.5       0       0       point

Stack "Nacelles"
  location (X Y Z) 7.75 7.5 1.825, rotation 0 0 0
  symmetric about XZ
  bounding box size 3.68525 15.8009 1.14018
  cross sections:
    n  XDelta    YDelta  ZDelta  shape
    0  0         0       0       point
    1  0.64      0       0       circle Circle_Diameter=0.68
    2  0.16      0       -0.12   rounded rectangle RoundRectXSec_Radius=0.32 RoundedRect_Height=1.02703 RoundedRect_Width=0.787027
    3  0.878689  0       0.04    rounded rectangle RoundRectXSec_Radius=0.32 RoundedRect_Height=1.12 RoundedRect_Width=0.787027
    4  1.2       0       0.04    rounded rectangle RoundRectXSec_Radius=0.32 RoundedRect_Height=0.88 RoundedRect_Width=0.64
    5  0.406557  0       0.08    ellipse Ellipse_Height=0.560432 Ellipse_Width=0.48
    6  0.4       0       0       point

Propeller "Propellers"
  location (X Y Z) 8.1 7.5 1.825, rotation 0 0 0
  symmetric about XZ
  bounding box size 0.1951 17.2012 2.15359
  Design: Diameter=2.2 NumBlade=7 Beta34=20 UseBeta34Flag=1 Feather=-2.40147 Rotate=0 Precone=0 ReverseFlag=0 FoldAngle=0 PropMode=0 AF=96.4324 CLi=0.540239 Chord=0.159783 Solidity=0.356024 ConstructXoC=0.5 FeatherAxisXoC=0.5 FeatherOffsetXoC=0
  cross sections:
    n  RadiusFrac  shape
    0  0.1         ellipse Ellipse_Height=0.0420139 Ellipse_Width=0.0840278
    1  0.4         NACA 16-series Chord=0.224546 IdealCl=0.7 ThickChord=0.144074
    2  1           NACA 16-series Chord=0.039213 IdealCl=0.2 ThickChord=0.03
  Chord along r/R (cubic Bezier): 0.1: 0.0763889, 0.186519: 0.195, 0.273038: 0.203704, 0.359557: 0.203704, 0.513943: 0.208796, 0.668329: 0.173148, 0.822715: 0.1375, 0.88181: 0.112037, 0.940905: 0.0763889, 1: 0.0356481
  Twist along r/R (PCHIP): 0.1: 81.4, 1: -0.290278
  Thick along r/R (cubic Bezier): 0.1: 0.5, 0.166667: 0.3, 0.233333: 0.225, 0.3: 0.2, 0.4: 0.125, 0.5: 0.115, 0.6: 0.1, 0.733333: 0.075, 0.866667: 0.055, 1: 0.03
  CLI along r/R (cubic Bezier): 0.1: 0, 0.2: 0.7, 0.3: 0.7, 0.4: 0.7, 0.466667: 0.7, 0.533333: 0.7, 0.6: 0.7, 0.733333: 0.7, 0.866667: 0.7, 1: 0.2
