OpenVSP model (file version 5), 5 components.
Geometry view with OpenVSP parameter names; values to 6 digits, angles in degrees, lengths in the model's unit.
Overall bounding box: X_Min=-0.0116734 X_Len=27.2408 Y_Min=-13.5268 Y_Len=27.0536 Z_Min=-1.3175 Z_Len=6.15142

Fuselage "main_fuselage"
  location (X Y Z) 0 0 0, rotation 0 0 0
  bounding box size 27.2408 2.865 2.635
  Design: Length=27.2291
  cross sections:
    n   XLocPercent  XRotate  YLocPercent  ZLocPercent   shape
    0   0            90       0            -0.0122415    file fuselage section Height=0.0002 Width=0.0583177
    1   8.88755e-05  90       0            -0.0121141    file fuselage section Height=0.07693 Width=0.142454
    2   0.000888755  90       0            -0.0120726    file fuselage section Height=0.263879 Width=0.283294
    3   0.00444377   90       0            -0.0123453    file fuselage section Height=0.639946 Width=0.494536
    4   0.00888755   90       0            -0.0125884    file fuselage section Height=0.907647 Width=0.688048
    5   0.0177751    90       0            -0.0127669    file fuselage section Height=1.27027 Width=0.989098
    6   0.0266626    90       0            -0.0124736    file fuselage section Height=1.57384 Width=1.23129
    7   0.0355502    90       0            -0.0117903    file fuselage section Height=1.836 Width=1.44182
    8   0.0444377    90       0            -0.0106486    file fuselage section Height=2.064 Width=1.63766
    9   0.0601195    90       0            -0.00522347   file fuselage section Height=2.41 Width=2.11498
    10  0.091483     90       0            -0.000628982  file fuselage section Height=2.73 Width=2.55144
    11  0.107165     90       0            -0.000171238  file fuselage section Height=2.808 Width=2.61581
    12  0.121267     90       0            1.61512e-06   file fuselage section Height=2.86 Width=2.63399
    13  0.122846     90       0            0             file fuselage section Height=2.865 Width=2.635
    14  0.66462      90       0            0             as above
    15  0.664753     90       0            0             as above
    16  0.674916     90       0            0             file fuselage section Height=2.86019 Width=2.63408
    17  0.767587     90       0            0.0060051     file fuselage section Height=2.72781 Width=2.26332
    18  0.860475     90       0            0.0106931     file fuselage section Height=1.724 Width=1.6399
    19  0.934192     90       0            0.0153731     file fuselage section Height=1.19979 Width=1.0454
    20  0.981515     90       0            0.0199541     file fuselage section Height=0.458909 Width=0.663792
    21  1            90       0            0.0211479     file fuselage section Height=0.00802296 Width=0.47422

Fuselage "uniEngine1Nacelle1"
  location (X Y Z) 9.59032 4.05082 0.940502, rotation 0 0 0
  symmetric about XZ
  bounding box size 3.76065 9.19274 1.38096
  Design: Length=3.76065
  cross sections:
    n  XLocPercent  XRotate  YLocPercent  ZLocPercent  shape
    0  0            90       0            0            file fuselage section Height=0.815949 Width=1.03272
    1  0.2          90       0            0            file fuselage section Height=1.09109 Width=1.38096
    2  0.5          90       0            0            as above
    3  0.7          90       0            0            file fuselage section Height=0.963792 Width=1.21984
    4  1            90       0            0            file fuselage section Height=0.47439 Width=0.60042

Wing "wing"
  location (X Y Z) 11.079 0 1.222, rotation 0 0 0
  symmetric about XZ
  bounding box size 2.76703 27.0536 0.546806
  totals: TotalSpan=27.0555 TotalProjectedSpan=27.0514 TotalChord=2.37163 TotalArea=61 TotalAR=11.9963
  root: chord 2.74911, twist 0, airfoil file "NACA45018"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 BaseThickChord=0.179677 ThickChord=0.181086
  sections:
    n  Span     Root_Chord  Tip_Chord  Area     Sweep  Sweep_Location  Dihedral  Twist  Twist_Location  tip airfoil
    1  4.03127  2.74911     2.57339    10.7282  2.704  0               1         0      0.25            as above
    2  9.49648  2.57339     1.59064    19.7718  2.704  0               1         0      0.25            airfoil file "NACA45018"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 BaseThickChord=0.179677 ThickChord=0.130784

Wing "htp"
  location (X Y Z) 24.74 0 4.721, rotation 0 0 0
  symmetric about XZ
  bounding box size 1.82774 7.31309 0.31248
  totals: TotalSpan=7.31095 TotalProjectedSpan=7.30984 TotalChord=1.46219 TotalArea=10.69 TotalAR=4.99848
  root: chord 1.82774, twist 0, airfoil file "NACA0009"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 BaseThickChord=0.0895566 ThickChord=0.170031
  sections:
    n  Span     Root_Chord  Tip_Chord  Area   Sweep    Sweep_Location  Dihedral  Twist  Twist_Location  tip airfoil
    1  3.65548  1.82774     1.09664    5.345  8.81657  0               1         0      0.25            as above

Wing "vtp"
  location (X Y Z) 22.28 0 0.906, rotation 90 0 0
  bounding box size 4.86393 0.482951 4.50955
  totals: TotalSpan=4.50955 TotalProjectedSpan=4.50955 TotalChord=2.81847 TotalArea=12.71 TotalAR=1.6
  root: chord 3.52308, twist 0, airfoil file "NACA0009"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 BaseThickChord=0.0895566 ThickChord=0.137025
  sections:
    n  Span     Root_Chord  Tip_Chord  Area   Sweep    Sweep_Location  Dihedral  Twist  Twist_Location  tip airfoil
    1  4.50955  3.52308     2.11385    12.71  31.3763  0               0         0      0.25            as above
